Lp(L, p, σ, δ, r, D, H) :=
    i ← last(L)
    a ← L[last(L)]
    v ← p - a
    if r == 0 or |v| < δ
        L[i + 1] ← p
        return L
    otherwise
        φ ← D*rnd(2*π)
        σ ← σ/2^H
        n ← rnorm(1, 0, σ)[0]
        d ← a + 0.5*v + n*[sin(φ); cos(φ)]
        r ← r - 1
        L ← Lp(L, d, σ, δ, r, D, H)
        return Lp(L, p, σ, δ, r, D, H)
L[0] := [0; 0]
p := [1; 0]
l1 := Lp(L, p, 0.3, 0, 8, 0, 0.5)
i := 1 .. last(l1)
l2(i) := l1[i]
lx[i] := l2(i)[0]
ly[i] := l2(i)[1]
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distparam(i, σ, r, H) :=
    y[0] ← (length2 ← 0)
    for j ∈ 0 .. i - 1
        L[0] ← [0; 0]
        p ← [1; 0]
        l1 ← Lp(L, p, σ, 0, r, 0, H)
        l2(l) ← l1[l]
        ly1[0] ← l2(0)[1]
        for l ∈ 1 .. last(l1)
            length2 ← length2 + |l1[l] - l1[l - 1]|
            ly1[l] ← l2(l)[1]
            y[l] ← |ly1[l] - ly1[0]|
        ymax[j] ← max(y)
        ymean[j] ← mean(y)
        length[j] ← length2/|l1[last(l1)] - l1[0]|
        length2 ← 0
    length1 ← mean(length)
    ymax1 ← mean(ymax)
    ymean1 ← mean(ymean)
    distparam ← [length1, ymax1, ymean1]
distparam(100, 0.2, 10, 0.5) = [7.3874, 0.23606, 0.0872745]
param1(j, r) :=
    H ← 0
    k ← 1/j
    func
    for i ∈ 0 .. j
        func1[i] ← distparam(100, 0.3, r, H)
        H ← H + k
    param ← func1
param(j, r) :=
    σ ← 0
    k ← 0.5/j
    σ ← σ + k
    func1[0] ← [1, 0, 0]
    for i ∈ 1 .. j
        func1[i] ← distparam(100, σ, r, 0.5)
        σ ← σ + k
    param ← func1
func2 := param1(10, 8)
j := 0 .. 10
длина2_4(j) := func2[j][:, 0]
func1_1 := param(10, 8)
ymax2(j) := func2[j][:, 1]
длина1_4(j) := func1_1[j][:, 0]
ymean2(j) := func2[j][:, 2]
ymax(j) := func1_1[j][:, 1]
ymean(j) := func1_1[j][:, 2]
# график от H где i в 10 раз больше H, то есть H от 0 до 1 с шагом 0.1
# график от σ где i в 20 раз больше σ, то есть σ от 0 до 0.5 с шагом 0.05
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func2 := param1(10, 4)
func1_1 := param(10, 4)
длина2_2(j) := func2[j][:, 0]
длина1_2(j) := func1_1[j][:, 0]
func2 := param1(10, 6)
func1_1 := param(10, 6)
длина2_3(j) := func2[j][:, 0]
длина1_3(j) := func1_1[j][:, 0]
func2 := param1(10, 10)
func1_1 := param(10, 10)
длина2_5(i) := func2[j][:, 0]
длина1_5(j) := func1_1[j][:, 0]
# график от H где i в 10 раз больше H, то есть H от 0 до 1 с шагом 0.1
# график от σ где i в 20 раз больше σ, то есть σ от 0 до 0.5 с шагом 0.05
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n1[j] := длина2_4(j)[0]
n2[j] := ymax2(j)[0]
n3[j] := ymean2(j)[0]
x1[j] := j
z := 0 .. 10
l1 := expfit(x1, n1) = [69.8768; -0.538245; 0.888503]
l2 := expfit(x1, n2) = [1.32846; -0.391311; 0.152384]
l3 := expfit(x1, n3) = [0.326934; -0.33788; 0.0669473]
f1[j] := длина1_4(j)[0]
f2[j] := ymax(j)[0]
f3[j] := ymean(j)[0]
k1 := line(x1, f1) = [0.626533; 0.840115]
k2 := line(x1, f2) = [-0.0031403; 0.059296]
k3 := line(x1, f3) = [-0.00137997; 0.0222866]
r4(z) := l1[0]*e^(l1[1]*z) + l1[2] → 69.8767816299*e^(-0.538245078533*z) + 0.888503402329
r1(z) := k1[1]*z + k1[0] → 0.840115094706*z + 0.626533060967
r5(z) := l2[0]*e^(l2[1]*z) + l2[2] → 1.32845747029*e^(-0.391311251675*z) + 0.15238399816
r2(z) := k2[1]*z + k2[0] → 0.0592959647722*z - 0.00314030030473
r6(z) := l3[0]*e^(l3[1]*z) + l3[2] → 0.326934265554*e^(-0.337880215953*z) + 0.0669473390489
r3(z) := k3[1]*z + k3[0] → 0.0222866494602*z - 0.00137997430592
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r4(0) = 70.7653
