# Шум Перлина вызывается функцией perlin(N,M,n,m,N2), где NxM - размер текстуры, а nxm - количество клеток в клетчатом поле и N2 - массив узловых элементов, формируемый функцией grad2(n,m), описанной ниже. Для отображение его в RGB формате используется одна из функций:
# 1) color(F,c1) - красит массив в цвет c1, в зависимости от значения элемента массива F,  сформированного функцией шума Перлина
# 2) mix2Mass(F,c1,c2) - цветовое смешивание по двум цветам элементов массива F, сформированного функцией шума Перлина (mix2(F,c1,c2) - для одного элемента)
# 3) mix3Mass(F,c1,c2,c3) - цветовое смешивание по трем цветам элементов массива F, сформированного функцией шума Перлина (mix3(F,c1,c2,c3) - для одного элемента)
# Функция grad2(n,m) - формирует градиентные векторы по формуле Nij = [urf(1) urf(1)] (используется в шуме Перлина)
#
# Также присутствуют функции фильтрации:
# 1) nor(F) - нормализация карты F
# 2) stamp(F,q) - заменяет все значения F[vu] ≥ q на 1, а F[vu] < q на 0
# 3) abs(F) - заменяет все отрицательные значения в карте F на положительные
# 4) modul(F) - модульный фильтр, изменяющий все значения карты F, не входящие в [0,1), входящие в [0,1)
# 5) modul1(F,q) - модульный фильтр, изменяющий все значения карты F, не входящие в (-q,q), входящие в (-q,q)
# 6) tile(F,n,m) - делает карту текстуры тайловой (nxm - количество клеток в клетчатом поле)
# 7) multipart(F,n,m) - делает текстуру мультивариантой (nxm - количество копий по длине и ширине)
# 8) multipartRGB(F,n,m) - делает RGB текстуру мультивариантой
multipart(F, n, m) :=
    for i ∈ 0 .. n - 1
        for j ∈ 0 .. m - 1
            for k ∈ 0 .. rows(F) - 1
                for l ∈ 0 .. cols(F) - 1
                    M[i*rows(F) + k, j*cols(F) + l] ← F[k, l]
    M
lin(a, b, f) := (1 - f)*a + f*b
abs(F) :=
    for i ∈ 0 .. rows(F) - 1
        for j ∈ 0 .. cols(F) - 1
            F[i, j] ← |F[i, j]|
    F
modul(F) :=
    for i ∈ 0 .. rows(F) - 1
        for j ∈ 0 .. cols(F) - 1
            F[i, j] ← mod(mod(F[i, j], 1) + 1, 1)
    F
lin1(a, b, c, f) := (1 - f)^2*a + 2*f*(1 - f)*b + f^2*c
mix2(c1, c2, F) := lin(c1, c2, F)
mix3(c1, c2, c3, F) := lin1(c1, c2, c3, F)
L(t) := t
grad2(n, m) :=
    for i ∈ 0 .. n
        for j ∈ 0 .. m
            N[i, j] ← [rnd(2) - 1; rnd(2) - 1]
            N[i, j] ← N[i, j]/|N[i, j]|
    N
stamp(F, q) :=
    for i ∈ 0 .. rows(F) - 1
        for j ∈ 0 .. cols(F) - 1
            F[i, j] ← 1 if F[i, j] ≥ q
            F[i, j] ← 0 otherwise
    F
modul1(F, q) :=
    for i ∈ 0 .. rows(F) - 1
        for j ∈ 0 .. cols(F) - 1
            F[i, j] ← mod(F[i, j], q)
    F
multipartRGB(F, n, m) :=
    for i ∈ 0 .. rows(F) - 1
        for j ∈ 0 .. (cols(F)/3) - 1
            R[i, j] ← F[i, j]
            G[i, j] ← F[i, cols(F)/3 + j]
            B[i, j] ← F[i, 2*cols(F)/3 + j]
    augment(multipart(R, n, m), multipart(G, n, m), multipart(B, n, m))
mix2Mass(F, c1, c2) :=
    for i ∈ 0 .. rows(F) - 1
        for j ∈ 0 .. cols(F) - 1
            Color ← mix2(c1, c2, F[i, j])
            R[i, j] ← Color[0]
            G[i, j] ← Color[1]
            B[i, j] ← Color[2]
    augment(R, G, B)
color(F, c1) :=
    for i ∈ 0 .. rows(F) - 1
        for j ∈ 0 .. cols(F) - 1
            R[i, j] ← F[i, j]*c1[0]
            G[i, j] ← F[i, j]*c1[1]
            B[i, j] ← F[i, j]*c1[2]
    augment(R, G, B)
nor(F) :=
    FMax ← max(F)
    FMin ← min(F)
    for i ∈ 0 .. rows(F) - 1
        for j ∈ 0 .. cols(F) - 1
            F[i, j] ← (F[i, j] - FMin)/(FMax - FMin)
    F
tile2(F, n, m) :=
    h ← rows(F)/n
    d ← cols(F)/m
    for u ∈ 0 .. cols(F) - 1
        for v ∈ 0 .. rows(F) - 1
            F[v, u] ← F[v, cols(F) - 1 - u] if floor(u/d) == (m - 1)
    for v ∈ 0 .. rows(F) - 1
        for u ∈ 0 .. cols(F) - 1
            F[v, u] ← F[rows(F) - 1 - v, u] if floor(v/h) == (n - 1)
    F
mix3Mass(F, c1, c2, c3) :=
    for i ∈ 0 .. rows(F) - 1
        for j ∈ 0 .. cols(F) - 1
            Color ← mix3(c1, c2, c3, F[i, j])
            R[i, j] ← Color[0]
            G[i, j] ← Color[1]
            B[i, j] ← Color[2]
    augment(R, G, B)
perlin(N, M, n, m, N2) :=
    h ← N/n
    d ← M/m
    N1 ← N2
    for v ∈ 0 .. N - 1
        i ← floor(v/h)
        t ← (v/h) - i
        for u ∈ 0 .. M - 1
            j ← floor(u/d)
            τ ← (u/d) - j
            e0 ← N1[i, j]*[τ; t]
            e1 ← N1[i, j + 1]*[τ - 1; t]
            e2 ← N1[i + 1, j]*[τ; t - 1]
            e3 ← N1[i + 1, j + 1]*[τ - 1; t - 1]
            F[v, u] ← lin(lin(e0, e2, L(t)), lin(e1, e3, L(t)), L(τ))
    F
tile(F) :=
    for i ∈ 0 .. rows(F) - 1
        F[i, cols(F) - 1] ← F[i, 0]
    for j ∈ 0 .. cols(F) - 1
        F[rows(F) - 1, j] ← F[0, j]
    F
tile1(F, n, m) :=
    h ← rows(F)/n
    d ← cols(F)/m
    for u ∈ 0 .. cols(F) - 1
        if floor(u/d) == (m - 1)
            uF ← u
            break
    for v ∈ 0 .. rows(F) - 1
        if floor(v/h) == (n - 1)
            vF ← v
            break
    for u ∈ 0 .. cols(F) - 1
        for v ∈ 0 .. rows(F) - 1
            F[v, u] ← F[v, u - uF] if floor(u/d) == (m - 1)
    for v ∈ 0 .. rows(F) - 1
        for u ∈ 0 .. cols(F) - 1
            F[v, u] ← F[v - vF, u] if floor(v/h) == (n - 1)
    F
F := [
    1, 2, 3, 4, 5, 6;
    4, 3, 1, 23, 4, 5;
    7, 3, 1, 3, 1, 6;
    4, 4, 3, 2, 3, 4;
    5, 2, 3, 5, 7, 8;
    3, 2, 5, 1, 2, 3
]
tile(F) = [
    1, 2, 3, 4, 5, 1;
    4, 3, 1, 23, 4, 4;
    7, 3, 1, 3, 1, 7;
    4, 4, 3, 2, 3, 4;
    5, 2, 3, 5, 7, 5;
    1, 2, 3, 4, 5, 1
]
c := [255; 255; 255]
F1 := perlin(240, 240, 1, 1, grad2(1, 1))
P := modul1(F1, 0.197)
image := color(modul(P), c)
image1 := color(nor(P), c)
image2 := color(nor(abs(P)), c)
# [component: inputs extract(image)]
# [component: inputs extract(image1)]
# [component: inputs extract(image2)]
F2 := perlin(240, 240, 3, 3, grad2(3, 3))
F3 := perlin(240, 240, 10, 3, grad2(10, 3))
image4 := color(stamp(abs(P), 0.1), c)
P := modul1(F2, 0.197)
image5 := mix2Mass(nor(F3), [0; 0; 255], [255; 255; 255])
image3 := color(modul(10*P), c)
# [component: inputs extract(image3)]
# [component: inputs extract(image4)]
# [component: inputs extract(image5)]
image6 := color(stamp(perlin(240, 240, 6, 5, grad2(6, 5)), 0), [255; 0; 0]) + color(stamp(perlin(240, 240, 6, 5, grad2(6, 5)), 0), [0; 255; 0]) + color(stamp(perlin(240, 240, 6, 5, grad2(6, 5)), 0), [0; 0; 255])
# [component: inputs extract(image6)]
F3 := perlin(240, 240, 12, 15, grad2(12, 15))
F4 := perlin(240, 240, 4, 2, grad2(4, 2))
F5 := perlin(240, 240, 8, 4, grad2(8, 4))
image7 := mix2Mass(nor(F3), [128; 0; 0], [255; 255; 0])
image8 := mix2Mass(nor(F4), [0; 0; 255], [255; 255; 255])
image9 := mix2Mass(nor(F5), [0; 200; 255], [255; 255; 0])
# [component: inputs extract(image7)]
# [component: inputs extract(image8)]
# [component: inputs extract(image9)]
F6 := perlin(240, 240, 16, 8, grad2(16, 8))
F7 := perlin(240, 240, 32, 16, grad2(32, 16))
image10 := mix2Mass(nor(F6), [255; 0; 0], [0; 200; 255])
image11 := mix2Mass(nor(F7), [119; 0; 255], [0; 200; 255])
# [component: inputs extract(image10)]
# [component: inputs extract(image11)]
H := 0.5*image8 + 0.2*image9 + 0.2*image10 + 0.1*image11
C := multipartRGB(H, 2, 2)
# [component: inputs extract(C)]
N := grad2(4, 4)
N := tile(N)
F8 := perlin(240, 240, 4, 4, N)
image12 := mix2Mass(multipart(nor(F8), 2, 3), [75; 20; 0], [255; 255; 0])
image13 := mix3Mass(multipart(tile(nor(F8)), 2, 3), [75; 20; 0], [255; 0; 0], [255; 255; 0])
# [component: inputs extract(image12)]
# [component: inputs extract(image13)]
