pila(n) :=
    p[0] ← [(x[0] ← 0); (y[0] ← 0)]
    for i ∈ 1 .. n
        p[i] ← [(x[i] ← x[i - 1] + 1); (y[i] ← mod(i, 2))]
    p
T(t) := [1; t; t^2; t^3]
T1(t) := d/dt(T(t)) → [0; 1; 2*t; 3*t^2]
T2(t) := d/dt(T1(t)) → [0; 0; 2; 6*t]
P := pila(5)
func(p, V1, A1) :=
    a[0] ← (b[0] ← 0)
    V[0] ← V1
    A[0] ← A1
    for i ∈ 1 .. last(p)
        a[i] ← b[i - 1]
        b[i] ← a[i] + 1
        Q[i] ← [
            T(a[i])[0], T(b[i])[0], T1(a[i])[0], T2(a[i])[0];
            T(a[i])[1], T(b[i])[1], T1(a[i])[1], T2(b[i])[1];
            T(a[i])[2], T(b[i])[2], T1(a[i])[2], T2(a[i])[2];
            T(a[i])[3], T(b[i])[3], T1(a[i])[3], T2(a[i])[3]
        ]
        U[i] ← [p[i - 1][0], p[i][0], V[i - 1][0], A[i - 1][0]; p[i - 1][1], p[i][1], V[i - 1][1], A[i - 1][1]]
        S[i] ← U[i]*Q[i]^-1
        V[i] ← S[i]*T1(b[i])
        A[i] ← S[i]*T2(b[i])
    S
func1(p, V1, A1) :=
    A[last(p)] ← A1
    V[last(p)] ← V1
    a[0] ← (b[0] ← 0)
    for j ∈ 1 .. last(p)
        a[j] ← b[j - 1]
        b[j] ← a[j] + 1
    for i ∈ last(p) .. 1
        Q[i] ← [
            T(a[i])[0], T(b[i])[0], T1(b[i])[0], T2(b[i])[0];
            T(a[i])[1], T(b[i])[1], T1(b[i])[1], T2(b[i])[1];
            T(a[i])[2], T(b[i])[2], T1(b[i])[2], T2(b[i])[2];
            T(a[i])[3], T(b[i])[3], T1(b[i])[3], T2(b[i])[3]
        ]
        U[i] ← [p[i - 1][0], p[i][0], V[i][0], A[i][0]; p[i - 1][1], p[i][1], V[i][1], A[i][1]]
        S[i] ← U[i]*Q[i]^-1
        V[i - 1] ← S[i]*T1(a[i])
        A[i - 1] ← S[i]*T2(a[i])
    S
v := [1; 1.8]
a := [0.1; -1]
i := 0 .. last(P)*1000
f := 0 .. 1
p(t) :=
    for j ∈ 1 .. last(P)
        p3[j] ← func(P, v, a)[j]*T(t) if t ≥ j - 1 and t ≤ j
m := 0 .. last(P)
p1(t) :=
    for j ∈ 1 .. last(P)
        p3[j] ← func1(P, v, a)[j]*T(t) if t ≥ j - 1 and t ≤ j
x_1[m] := p(m)[0]
ax[1] := a[0]
vx[1] := v[0]
x[i] := p(i/1000)[0]
x1[i] := p1(i/1000)[0]
x1_1[m] := p1(m)[0]
y1_1[m] := p1(m)[1]
y[i] := p(i/1000)[1]
y_1[m] := p(m)[1]
ay[1] := a[1]
vy[1] := v[1]
y1[i] := p1(i/1000)[1]
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func2(p, V1, A1) :=
    a[0] ← (b[0] ← 0)
    V[0] ← V1
    A[0] ← A1
    for i ∈ 1 .. last(p)
        a[i] ← 0
        b[i] ← a[i] + 1
        Q[i] ← [
            T(a[i])[0], T(b[i])[0], T1(a[i])[0], T2(a[i])[0];
            T(a[i])[1], T(b[i])[1], T1(a[i])[1], T2(a[i])[1];
            T(a[i])[2], T(b[i])[2], T1(a[i])[2], T2(a[i])[2];
            T(a[i])[3], T(b[i])[3], T1(a[i])[3], T2(a[i])[3]
        ]
        U[i] ← [p[i - 1][0], p[i][0], V[i - 1][0], A[i - 1][0]; p[i - 1][1], p[i][1], V[i - 1][1], A[i - 1][1]]
        S[i] ← U[i]*Q[i]^-1
        V[i] ← S[i]*T1(b[i])
        A[i] ← S[i]*T2(b[i])
    S
func3(p, V1, A1) :=
    A[last(p)] ← A1
    V[last(p)] ← V1
    a[0] ← (b[0] ← 0)
    for j ∈ 1 .. last(p)
        a[j] ← 0
        b[j] ← a[j] + 1
    for i ∈ last(p) .. 1
        Q[i] ← [
            T(a[i])[0], T(b[i])[0], T1(b[i])[0], T2(b[i])[0];
            T(a[i])[1], T(b[i])[1], T1(b[i])[1], T2(b[i])[1];
            T(a[i])[2], T(b[i])[2], T1(b[i])[2], T2(b[i])[2];
            T(a[i])[3], T(b[i])[3], T1(b[i])[3], T2(b[i])[3]
        ]
        U[i] ← [p[i - 1][0], p[i][0], V[i][0], A[i][0]; p[i - 1][1], p[i][1], V[i][1], A[i][1]]
        S[i] ← U[i]*Q[i]^-1
        V[i - 1] ← S[i]*T1(a[i])
        A[i - 1] ← S[i]*T2(a[i])
    S
p3(t) :=
    for j ∈ 0 .. last(P) - 1
        p3[j] ← func3(P, v, a)[j + 1]*T(t) if t ≥ 0 and t ≤ 10
    p4 ← p3
p2(t) :=
    for j ∈ 0 .. last(P) - 1
        p3[j] ← func2(P, v, a)[j + 1]*T(t) if t ≥ 0 and t ≤ 10
    p2 ← p3
k1 := 0 .. (last(p2(0)) + 1)*1000
x4 :=
    k ← 0
    for i1 ∈ 0 .. last(p3(0))
        for i2 ∈ 1 .. 1000
            x4_1[k] ← p3(i2/1000)[i1][0, 0]
            k ← k + 1
    x4 ← x4_1
y4 :=
    k ← 0
    for i1 ∈ 0 .. last(p3(0))
        for i2 ∈ 1 .. 1000
            y4_1[k] ← p3(i2/1000)[i1][1, 0]
            k ← k + 1
    y4 ← y4_1
x3 :=
    k ← 0
    for i1 ∈ 0 .. last(p2(0))
        for i2 ∈ 1 .. 1000
            x3_1[k] ← p2(i2/1000)[i1][0, 0]
            k ← k + 1
    x3 ← x3_1
y3 :=
    k ← 0
    for i1 ∈ 0 .. last(p2(0))
        for i2 ∈ 1 .. 1000
            y3_1[k] ← p2(i2/1000)[i1][1, 0]
            k ← k + 1
    y3 ← y3_1
x4_1[m] := p(m)[0]
x3_1[m] := p(m)[0]
y4_1[m] := p(m)[1]
y3_1[m] := p(m)[1]
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