i := 1 .. 100
v[0] := 0
z[0] := 0
g[0] := 0
φ[0] := 0
σ := 1
φ[i] := rnd(2*π)
v1[0] := 0
g1[0] := 0
φ1[0] := 0
φ1[i] := rnd(2*π)
z1(σ, i) :=
    z1 ← 2*rnd(σ) - σ if i == 0
    z1 ← rnorm(1, 0, σ)[0] if i == 1
    z1 ← 0 otherwise
z2[i] := z1(σ, 0)
v1[i] := z2[i]*sin(φ1[i]) + v1[i - 1]
g1[i] := z2[i]*cos(φ1[i]) + g1[i - 1]
z[i] := z1(σ, 0)
x1_1[0] := 0
y1[0] := 0
v[i] := z[i]*sin(φ[i])
x1_1[i] := x1_1[i - 1] + v1[i]
g[i] := z[i]*cos(φ[i])
x[0] := 0
y[0] := 0
y1[i] := y1[i - 1] + g1[i]
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x[i] := x[i - 1] + v[i]
y[i] := y[i - 1] + g[i]
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χ := (x1_1[last(x)] - x1_1[0])^2 + (y1[last(y)] - y1[0])^2 = 77342.9
p[i] := [x[i], y[i]]
dist[0] := 0
χ := (x[last(x)] - x[0])^2 + (y[last(y)] - y[0])^2 = 25.8092
dist[i] := sqrt((x1_1[i] - x1_1[0])^2 + (y1[i] - y1[0])^2)
p[i] := [x[i], y[i]]
pc1 := max(dist) = 278.106
dist[0] := 0
dist[i] := sqrt((x[i] - x[0])^2 + (y[i] - y[0])^2)
distparam2(k, i, σ) :=
    distlast ← 0
    distmax ← 0
    distlength ← 0
    for j ∈ 1 .. k
        v[0] ← 0
        g[0] ← 0
        z[0] ← 0
        x[0] ← 0
        y[0] ← 0
        φ[0] ← 0
        for l ∈ 1 .. i
            φ[l] ← rnd(2*π)
            z[l] ← z1(σ, 0)
            v[l] ← z[l]*sin(φ[l]) + v[l - 1]
            g[l] ← z[l]*cos(φ[l]) + g[l - 1]
            x[l] ← x[l - 1] + v[l]
            y[l] ← y[l - 1] + g[l]
            dist[l] ← (x[l] - x[0])^2 + (y[l] - y[0])^2
            distlength ← distlength + (x[l] - x[l - 1])^2 + (y[l] - y[l - 1])^2
        distlast ← distlast + (x[last(x)] - x[0])^2 + (y[last(y)] - y[0])^2
        distmax ← distmax + max(dist)
    distmax ← distmax/k
    distlast ← distlast/k
    distlength ← distlength/k
    distparam2 ← [distlength, distmax, distlast]
pc := max(dist) = 8.37621
distparam(k, i, σ) :=
    distlast ← 0
    distmax ← 0
    distlength ← 0
    for j ∈ 1 .. k
        v[0] ← 0
        g[0] ← 0
        z[0] ← 0
        x[0] ← 0
        y[0] ← 0
        φ[0] ← 0
        for l ∈ 1 .. i
            φ[l] ← rnd(2*π)
            z[l] ← z1(σ, 0)
            v[l] ← z[l]*sin(φ[l])
            g[l] ← z[l]*cos(φ[l])
            x[l] ← x[l - 1] + v[l]
            y[l] ← y[l - 1] + g[l]
            dist[l] ← (x[l] - x[0])^2 + (y[l] - y[0])^2
            distlength ← distlength + (x[l] - x[l - 1])^2 + (y[l] - y[l - 1])^2
        distlast ← distlast + (x[last(x)] - x[0])^2 + (y[last(y)] - y[0])^2
        distmax ← distmax + max(dist)
    distmax ← distmax/k
    distlast ← distlast/k
    distlength ← distlength/k
    distparam ← [distlength, distmax, distlast]
i := 1 .. 99
distparam(1000, 100, 1) = [33.4863, 48.3688, 33.0141]
func2[i] := distparam2(1000, i, 1)
func[i] := distparam(1000, i, 1)
длина3(i) := func2[i][:, 0]
длина1(i) := func[i][:, 0]
max3(i) := func2[i][:, 1]
max1(i) := func[i][:, 1]
last3(i) := func2[i][:, 2]
last1(i) := func[i][:, 2]
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param(j) :=
    σ ← 0
    k ← 1/j
    for i ∈ 0 .. j
        func1[i] ← distparam(1000, 100, σ)
        σ ← σ + k
    param ← func1
param2(j) :=
    σ ← 0
    k ← 1/j
    for i ∈ 1 .. (j - 1)
        σ ← σ + k
        func3[i] ← distparam2(1000, 100, σ)
    param2 ← func3
func3 := param2(100)
z := 0 .. 100
func1 := param(100)
x1[i] := i
длина2(i) := func1[i][:, 0]
длина4(i) := func3[i][:, 0]
max2(i) := func1[i][:, 1]
max4(i) := func3[i][:, 1]
last2(i) := func1[i][:, 2]
last4(i) := func3[i][:, 2]
# график от σ где i в 100 раз больше σ, то есть σ от 0 до 1 с шагом 0.01
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# график от σ где i в 100 раз больше σ, то есть σ от 0 до 1 с шагом 0.01
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z1_1[i] := длина3(i)[0]
z3[i] := last3(i)[0]
f1[i] := длина1(i)[0]
f2[i] := max1(i)[0]
f3[i] := last1(i)[0]
z2_2[i] := max3(i)[0]
l1 := expfit(x1, z1_1) = [295.204; 0.0195418; -351.209]
l2 := expfit(x1, z2_2) = [4238.11; 0.0338121; -7200.93]
l3 := expfit(x1, z3) = [4222.18; 0.0338186; -7173.44]
k1 := line(x1, f1) = [-0.00938104; 0.333709]
k2 := line(x1, f2) = [-0.762707; 0.486275]
k3 := line(x1, f3) = [-0.0823573; 0.33433]
r1(z) := k1[1]*z + k1[0] → 0.33370933012*z - 0.00938103660534
r4(z) := l1[0]*e^(l1[1]*z) + l1[2] → 295.204333134*e^(0.0195418474287*z) - 351.209472742
r2(z) := k2[1]*z + k2[0] → 0.486275085618*z - 0.762706804601
r5(z) := l2[0]*e^(l1[1]*z) + l2[2] → 4238.10560293*e^(0.0195418474287*z) - 7200.92898124
r3(z) := k3[1]*z + k3[0] → 0.33433034129*z - 0.0823572833089
r6(z) := l3[0]*e^(l1[1]*z) + l3[2] → 4222.18366415*e^(0.0195418474287*z) - 7173.4447815
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z := 1 .. 100
t := 1 .. 99
x3[0] := 1
x3[t] := t + 1
j := 0 .. 100
x2[j] := j
n1[i] := длина4(i)[0]
n2[i] := max4(i)[0]
n3[i] := last4(i)[0]
y1[j] := длина2(j)[0]
y2[j] := max2(j)[0]
y3[j] := last2(j)[0]
l1 := expfit(x3, n1) = [287.379; 0.019538; -350.533]
l2 := expfit(x3, n2) = [19044.3; 0.0196543; -23224.4]
l3 := expfit(x3, n3) = [18990.3; 0.0196519; -23159.2]
k1 := expfit(x2, y1) = [5.91709; 0.0194283; -7.0935]
k2 := expfit(x2, y2) = [8.18016; 0.0198431; -9.79554]
k3 := expfit(x2, y3) = [5.64366; 0.0198978; -6.75765]
r4(z) := l1[0]*e^(l1[1]*z) + l1[2] → 287.379495512*e^(0.0195380046117*z) - 350.533060475
r1(z) := k1[0]*e^(k1[1]*z) + k1[2] → 5.91708819161*e^(0.0194282831274*z) - 7.09349713197
r5(z) := l2[0]*e^(l2[1]*z) + l2[2] → 19044.2883345*e^(0.0196542752906*z) - 23224.3999199
r2(z) := k2[0]*e^(k2[1]*z) + k2[2] → 8.18016089851*e^(0.0198430857078*z) - 9.79554400748
r6(z) := l3[0]*e^(l3[1]*z) + l3[2] → 18990.2602655*e^(0.0196518770212*z) - 23159.1974225
r3(z) := k3[0]*e^(k3[1]*z) + k3[2] → 5.64365887973*e^(0.0198977692402*z) - 6.75765447937
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